<neuroml xmlns="http://www.neuroml.org/schema/neuroml2"  xmlns:xs="http://www.w3.org/2001/XMLSchema" xmlns:xsi="http://www.w3.org/2001/XMLSchema-instance" xsi:schemaLocation="http://www.neuroml.org/schema/neuroml2 https://raw.github.com/NeuroML/NeuroML2/development/Schemas/NeuroML2/NeuroML_v2beta4.xsd" id="CerebellarCortex">
    <include href="MossyFiber.cell.nml"></include>
    <include href="Granule_98.cell.nml"></include>
    <include href="Golgi_040408_C1.cell.nml"></include>
    <include href="MF_AMPA.synapse.nml"></include>
    <include href="AMPA_GranGol.synapse.nml"></include>
    <include href="GABAA.synapse.nml"></include>
    <include href="MFSpikeSyn.synapse.nml"></include>
    <poissonFiringSynapse id="input100Hz" averageRate="100 per_s" synapse="MFSpikeSyn" spikeTarget="./MFSpikeSyn"/>
    <network id="CerebellarCortex" type="networkWithTemperature" temperature="32.0 degC">
        <notes>Network generated using libNeuroML v0.2.12</notes>
        <population id="MossyFibers" component="MossyFiber" size="44" type="populationList">
            <instance id="0">
                <location x="241.688140878000013" y="79.405901051800001" z="8.82772833185"/>
            </instance>
            <instance id="1">
                <location x="52.396915006100002" y="0.222987615998" z="199.16492001200001"/>
            </instance>
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        </population>
        <population id="Grans" component="Granule_98" size="100" type="populationList">
            <instance id="0">
                <location x="127.368829446999996" y="57.183980728400002" z="252.805349785000004"/>
            </instance>
            <instance id="1">
                <location x="147.979006083999991" y="16.288624820399999" z="217.380941933999992"/>
            </instance>
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        </population>
        <population id="Golgis" component="Golgi_040408_C1" size="6" type="populationList">
            <instance id="0">
                <location x="298.717124855999998" y="33.0713082527" z="63.511863867000002"/>
            </instance>
            <instance id="1">
                <location x="49.091375510200002" y="21.740155359399999" z="261.525040409999974"/>
            </instance>
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        </population>
        <projection id="NetConn_MossyFibers_Grans" presynapticPopulation="MossyFibers" postsynapticPopulation="Grans" synapse="MF_AMPA">
            <connection id="0" preCellId="../MossyFibers/1/MossyFiber" postCellId="../Grans/75/Granule_98"/>
            <connection id="1" preCellId="../MossyFibers/2/MossyFiber" postCellId="../Grans/34/Granule_98"/>
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        </projection>
        <projection id="NetConn_Grans_Golgis" presynapticPopulation="Grans" postsynapticPopulation="Golgis" synapse="AMPA_GranGol">
            <connection id="0" preCellId="../Grans/0/Granule_98" postCellId="../Golgis/4/Golgi_040408_C1"/>
            <connection id="1" preCellId="../Grans/0/Granule_98" postCellId="../Golgis/5/Golgi_040408_C1"/>
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        </projection>
        <projection id="NetConn_Golgis_Grans" presynapticPopulation="Golgis" postsynapticPopulation="Grans" synapse="GABAA">
            <connection id="0" preCellId="../Golgis/0/Golgi_040408_C1" postCellId="../Grans/42/Granule_98"/>
            <connection id="1" preCellId="../Golgis/0/Golgi_040408_C1" postCellId="../Grans/46/Granule_98"/>
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        </projection>
        <inputList id="Input_0" population="MossyFibers" component="input100Hz">
            <input id="0" target="../MossyFibers/0/MossyFiber" destination="synapses"/>
            <input id="1" target="../MossyFibers/1/MossyFiber" destination="synapses"/>
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        </inputList>
    </network>
</neuroml>
