<neuroml xmlns="http://www.neuroml.org/schema/neuroml2"  xmlns:xs="http://www.w3.org/2001/XMLSchema" xmlns:xsi="http://www.w3.org/2001/XMLSchema-instance" xsi:schemaLocation="http://www.neuroml.org/schema/neuroml2 https://raw.github.com/NeuroML/NeuroML2/development/Schemas/NeuroML2/NeuroML_v2beta4.xsd" id="CerebellarCortexLarge">
    <include href="Granule_98.cell.nml"></include>
    <include href="Golgi_98.cell.nml"></include>
    <include href="AMPA_GranGol.synapse.nml"></include>
    <include href="GABAA.synapse.nml"></include>
    <include href="purk2.cell.nml"></include>
    <network id="CerebellarCortexLarge" type="networkWithTemperature" temperature="32.0 degC">
        <notes>Network generated using libNeuroML v0.2.11</notes>
        <population id="Grans" type="populationList" component="Granule_98" size="2200">
            <instance id="0">
                <location y="13.078001628399999" x="52.363598850899997" z="407.241763670000012"/>
            </instance>
            <instance id="1">
                <location y="135.179831693000011" x="107.700234937999994" z="38.153666102300001"/>
            </instance>
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        </population>
        <population id="Golgis" type="populationList" component="Golgi_98" size="400">
            <instance id="0">
                <location y="85.282385489600003" x="936.199288388000014" z="543.206021080000028"/>
            </instance>
            <instance id="1">
                <location y="77.136288936499994" x="539.382181087000049" z="789.468284369999992"/>
            </instance>
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        </population>
        <population id="Purkinjes" type="populationList" component="purk2" size="20">
            <instance id="0">
                <location y="153.749223954999991" x="853.308179819999964" z="276.674869902000012"/>
            </instance>
            <instance id="1">
                <location y="168.715632703000011" x="609.486390426999947" z="349.001578486000028"/>
            </instance>
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        </population>
    </network>
</neuroml>
