<neuroml xmlns="http://www.neuroml.org/schema/neuroml2"  xmlns:xs="http://www.w3.org/2001/XMLSchema" xmlns:xsi="http://www.w3.org/2001/XMLSchema-instance" xsi:schemaLocation="http://www.neuroml.org/schema/neuroml2 https://raw.github.com/NeuroML/NeuroML2/development/Schemas/NeuroML2/NeuroML_v2beta4.xsd" id="Cerebellum3DDemo">
    <include href="Granule_98.cell.nml"></include>
    <include href="Golgi_98.cell.nml"></include>
    <include href="AMPA_GranGol.synapse.nml"></include>
    <include href="GABAA.synapse.nml"></include>
    <network id="Cerebellum3DDemo" type="networkWithTemperature" temperature="32.0 degC">
        <notes>Network generated using libNeuroML v0.2.6</notes>
        <population id="Grans" component="Granule_98" type="populationList" size="40">
            <instance id="0">
                <location y="44.073259917500003" x="966.453535691999946" z="7.49147005859"/>
            </instance>
            <instance id="1">
                <location y="93.926899736400003" x="910.975962449000008" z="582.227573058999951"/>
            </instance>
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        </population>
        <population id="Golgis" component="Golgi_98" type="populationList" size="20">
            <instance id="0">
                <location y="58.451181056499998" x="174.689918403000007" z="301.777057798999977"/>
            </instance>
            <instance id="1">
                <location y="53.434074784099998" x="812.851394358999983" z="499.587304193000023"/>
            </instance>
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        </population>
        <projection id="NetConn_Grans_Golgis" postsynapticPopulation="Golgis" presynapticPopulation="Grans" synapse="AMPA_GranGol">
            <connection id="6" preFractionAlong="0.5" preCellId="../Grans/0/Granule_98" postFractionAlong="0.5" postSegmentId="0" postCellId="../Golgis/7/Golgi_98" preSegmentId="0"/>
            <connection id="12" preFractionAlong="0.5" preCellId="../Grans/0/Granule_98" postFractionAlong="0.5" postSegmentId="0" postCellId="../Golgis/13/Golgi_98" preSegmentId="0"/>
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        </projection>
        <projection id="NetConn_Golgis_Grans" postsynapticPopulation="Grans" presynapticPopulation="Golgis" synapse="GABAA">
            <connection id="19" preFractionAlong="0.5" preCellId="../Golgis/0/Golgi_98" postFractionAlong="0.5" postSegmentId="0" postCellId="../Grans/1/Granule_98" preSegmentId="0"/>
            <connection id="43" preFractionAlong="0.5" preCellId="../Golgis/6/Golgi_98" postFractionAlong="0.5" postSegmentId="0" postCellId="../Grans/2/Granule_98" preSegmentId="0"/>
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        </projection>
    </network>
</neuroml>
