<neuroml xmlns="http://www.neuroml.org/schema/neuroml2"  xmlns:xs="http://www.w3.org/2001/XMLSchema" xmlns:xsi="http://www.w3.org/2001/XMLSchema-instance" xsi:schemaLocation="http://www.neuroml.org/schema/neuroml2 https://raw.github.com/NeuroML/NeuroML2/development/Schemas/NeuroML2/NeuroML_v2beta4.xsd" id="GCL_200x30x200_4grc_4gol">
    <include href="MossyFiber.cell.nml"></include>
    <include href="Granule_98.cell.nml"></include>
    <include href="Golgi_98.cell.nml"></include>
    <include href="MF_AMPA.synapse.nml"></include>
    <include href="AMPA_GranGol.synapse.nml"></include>
    <include href="GABAA.synapse.nml"></include>
    <include href="MFSpikeSyn.synapse.nml"></include>
    <poissonFiringSynapse id="input150Hz" averageRate="150 per_s" synapse="MFSpikeSyn" spikeTarget="./MFSpikeSyn"/>
    <network id="GCL_200x30x200_4grc_4gol" type="networkWithTemperature" temperature="32.0 degC">
        <notes>Network generated using libNeuroML v0.2.12</notes>
        <population id="MossyFibers" component="MossyFiber" size="4" type="populationList">
            <instance id="0">
                <location x="193.290707137999988" y="13.2219779753" z="1.49829401172"/>
            </instance>
            <instance id="1">
                <location x="182.195192490000011" y="28.178069920900001" z="116.445514611999997"/>
            </instance>
            <instance id="2">
                <location x="134.312696297999992" y="2.51814680511" z="153.296186557999988"/>
            </instance>
            <instance id="3">
                <location x="47.361955072599997" y="0.924420651798" z="157.754543447000003"/>
            </instance>
        </population>
        <population id="Grans" component="Granule_98" size="4" type="populationList">
            <instance id="0">
                <location x="69.2177931194" y="18.698444251200002" z="123.163139021000006"/>
            </instance>
            <instance id="1">
                <location x="29.710927741700001" y="5.4927194223" z="22.882593937700001"/>
            </instance>
            <instance id="2">
                <location x="2.92375609738" y="14.602546218100001" z="192.980312182999995"/>
            </instance>
            <instance id="3">
                <location x="12.912456195400001" y="16.2326455665" z="93.179711801699995"/>
            </instance>
        </population>
        <population id="Golgis" component="Golgi_98" size="4" type="populationList">
            <instance id="0">
                <location x="120.292689912" y="2.66786489972" z="115.800537237"/>
            </instance>
            <instance id="1">
                <location x="53.917100763900002" y="16.6929768167" z="128.92684683600001"/>
            </instance>
            <instance id="2">
                <location x="96.207274273300001" y="10.657174423300001" z="49.830424272199998"/>
            </instance>
            <instance id="3">
                <location x="186.703099608000002" y="13.6016405843" z="106.032241381999995"/>
            </instance>
        </population>
        <projection id="NetConn_MossyFibers_Grans" presynapticPopulation="MossyFibers" postsynapticPopulation="Grans" synapse="MF_AMPA">
            <connection id="0" preCellId="../MossyFibers/0/MossyFiber" postCellId="../Grans/3/Granule_98"/>
        </projection>
        <projection id="NetConn_Grans_Golgis" presynapticPopulation="Grans" postsynapticPopulation="Golgis" synapse="AMPA_GranGol">
            <connection id="0" preCellId="../Grans/0/Granule_98" postCellId="../Golgis/3/Golgi_98"/>
            <connection id="1" preCellId="../Grans/1/Granule_98" postCellId="../Golgis/0/Golgi_98"/>
            <connection id="2" preCellId="../Grans/1/Granule_98" postCellId="../Golgis/2/Golgi_98"/>
            <connection id="3" preCellId="../Grans/1/Granule_98" postCellId="../Golgis/3/Golgi_98"/>
            <connection id="4" preCellId="../Grans/2/Granule_98" postCellId="../Golgis/1/Golgi_98"/>
            <connection id="5" preCellId="../Grans/2/Granule_98" postCellId="../Golgis/3/Golgi_98"/>
            <connection id="6" preCellId="../Grans/3/Granule_98" postCellId="../Golgis/1/Golgi_98"/>
        </projection>
        <projection id="NetConn_Golgis_Grans" presynapticPopulation="Golgis" postsynapticPopulation="Grans" synapse="GABAA">
            <connection id="0" preCellId="../Golgis/0/Golgi_98" postCellId="../Grans/1/Granule_98"/>
            <connection id="1" preCellId="../Golgis/0/Golgi_98" postCellId="../Grans/2/Granule_98"/>
            <connection id="2" preCellId="../Golgis/0/Golgi_98" postCellId="../Grans/3/Granule_98"/>
            <connection id="3" preCellId="../Golgis/1/Golgi_98" postCellId="../Grans/0/Granule_98"/>
            <connection id="4" preCellId="../Golgis/1/Golgi_98" postCellId="../Grans/3/Granule_98"/>
            <connection id="5" preCellId="../Golgis/2/Golgi_98" postCellId="../Grans/1/Granule_98"/>
            <connection id="6" preCellId="../Golgis/3/Golgi_98" postCellId="../Grans/1/Granule_98"/>
        </projection>
        <inputList id="Input_0" population="MossyFibers" component="input150Hz">
            <input id="0" target="../MossyFibers/0/MossyFiber" destination="synapses"/>
            <input id="1" target="../MossyFibers/1/MossyFiber" destination="synapses"/>
            <input id="2" target="../MossyFibers/2/MossyFiber" destination="synapses"/>
            <input id="3" target="../MossyFibers/3/MossyFiber" destination="synapses"/>
        </inputList>
    </network>
</neuroml>
