<Lems>

    <!--

        This LEMS file has been automatically generated using PyNeuroML v0.1.7 (libNeuroML v0.2.11)

     -->

    <!-- Specify which component to run -->
    <Target component="Sim_CerebellarCortex"/>

    <!-- Include core NeuroML2 ComponentType definitions -->
    <Include file="Cells.xml"/>
    <Include file="Networks.xml"/>
    <Include file="Simulation.xml"/>

    <Include file="Granule_98.cell.nml"/>
    <Include file="Gran_CaHVA_98.channel.nml"/>
    <Include file="Gran_CaPool_98.nml"/>
    <Include file="Gran_H_98.channel.nml"/>
    <Include file="Gran_KA_98.channel.nml"/>
    <Include file="Gran_KCa_98.channel.nml"/>
    <Include file="Gran_KDr_98.channel.nml"/>
    <Include file="Gran_NaF_98.channel.nml"/>
    <Include file="GranPassiveCond.channel.nml"/>
    <Include file="Golgi_040408_C1.cell.nml"/>
    <Include file="Golgi_Ca_HVA.channel.nml"/>
    <Include file="Golgi_Ca_LVA.channel.nml"/>
    <Include file="Golgi_CALC.nml"/>
    <Include file="Golgi_CALC_ca2.nml"/>
    <Include file="Golgi_hcn1f.channel.nml"/>
    <Include file="Golgi_hcn1s.channel.nml"/>
    <Include file="Golgi_hcn2f.channel.nml"/>
    <Include file="Golgi_hcn2s.channel.nml"/>
    <Include file="Golgi_KA.channel.nml"/>
    <Include file="Golgi_KC.channel.nml"/>
    <Include file="Golgi_Kslow.channel.nml"/>
    <Include file="Golgi_KAHP.channel.nml"/>
    <Include file="Golgi_KV.channel.nml"/>
    <Include file="LeakCond.channel.nml"/>
    <Include file="Golgi_NaP.channel.nml"/>
    <Include file="Golgi_NaR.channel.nml"/>
    <Include file="Golgi_NaT.channel.nml"/>
    <Include file="CerebellarCortex.net.nml"/>
    <Include file="Granule_98.cell.nml"/>
    <Include file="Gran_CaHVA_98.channel.nml"/>
    <Include file="Gran_CaPool_98.nml"/>
    <Include file="Gran_H_98.channel.nml"/>
    <Include file="Gran_KA_98.channel.nml"/>
    <Include file="Gran_KCa_98.channel.nml"/>
    <Include file="Gran_KDr_98.channel.nml"/>
    <Include file="Gran_NaF_98.channel.nml"/>
    <Include file="GranPassiveCond.channel.nml"/>
    <Include file="Golgi_040408_C1.cell.nml"/>
    <Include file="Golgi_Ca_HVA.channel.nml"/>
    <Include file="Golgi_Ca_LVA.channel.nml"/>
    <Include file="Golgi_CALC.nml"/>
    <Include file="Golgi_CALC_ca2.nml"/>
    <Include file="Golgi_hcn1f.channel.nml"/>
    <Include file="Golgi_hcn1s.channel.nml"/>
    <Include file="Golgi_hcn2f.channel.nml"/>
    <Include file="Golgi_hcn2s.channel.nml"/>
    <Include file="Golgi_KA.channel.nml"/>
    <Include file="Golgi_KC.channel.nml"/>
    <Include file="Golgi_Kslow.channel.nml"/>
    <Include file="Golgi_KAHP.channel.nml"/>
    <Include file="Golgi_KV.channel.nml"/>
    <Include file="LeakCond.channel.nml"/>
    <Include file="Golgi_NaP.channel.nml"/>
    <Include file="Golgi_NaR.channel.nml"/>
    <Include file="Golgi_NaT.channel.nml"/>
    <Include file="AMPA_GranGol.synapse.nml"/>
    <Include file="GABAA.synapse.nml"/>
    <Include file="MF_AMPA.synapse.nml"/>
    <Include file="purk2.cell.nml"/>
    <Include file="Leak.channel.nml"/>

    <Simulation id="Sim_CerebellarCortex" length="500ms" step="0.01ms" target="CerebellarCortex">

        <Display id="display_grc" title="Voltages Granule cells" timeScale="1ms" xmin="-50.0" xmax="550.0" ymin="-95" ymax="-38">
            <Line id="GrC 0: Vm" quantity="Grans/0/Granule_98/v" scale="1mV" color="#b3448e" timeScale="1ms"/>
            <Line id="GrC 1: Vm" quantity="Grans/1/Granule_98/v" scale="1mV" color="#d4ccf5" timeScale="1ms"/>
            <Line id="GrC 2: Vm" quantity="Grans/2/Granule_98/v" scale="1mV" color="#5e8b7f" timeScale="1ms"/>
            <Line id="GrC 3: Vm" quantity="Grans/3/Granule_98/v" scale="1mV" color="#f53f71" timeScale="1ms"/>
            <Line id="GrC 4: Vm" quantity="Grans/4/Granule_98/v" scale="1mV" color="#d82544" timeScale="1ms"/>
            <Line id="GrC 5: Vm" quantity="Grans/5/Granule_98/v" scale="1mV" color="#cf790d" timeScale="1ms"/>
            <Line id="GrC 6: Vm" quantity="Grans/6/Granule_98/v" scale="1mV" color="#6eaed2" timeScale="1ms"/>
            <Line id="GrC 7: Vm" quantity="Grans/7/Granule_98/v" scale="1mV" color="#8afe7a" timeScale="1ms"/>
            <Line id="GrC 8: Vm" quantity="Grans/8/Granule_98/v" scale="1mV" color="#a4ade3" timeScale="1ms"/>
            <Line id="GrC 9: Vm" quantity="Grans/9/Granule_98/v" scale="1mV" color="#a03f82" timeScale="1ms"/>
            <Line id="GrC 10: Vm" quantity="Grans/10/Granule_98/v" scale="1mV" color="#b019ac" timeScale="1ms"/>
            <Line id="GrC 11: Vm" quantity="Grans/11/Granule_98/v" scale="1mV" color="#7c9915" timeScale="1ms"/>
            <Line id="GrC 12: Vm" quantity="Grans/12/Granule_98/v" scale="1mV" color="#c8d522" timeScale="1ms"/>
            <Line id="GrC 13: Vm" quantity="Grans/13/Granule_98/v" scale="1mV" color="#c86e71" timeScale="1ms"/>
            <Line id="GrC 14: Vm" quantity="Grans/14/Granule_98/v" scale="1mV" color="#ef7187" timeScale="1ms"/>
            <Line id="GrC 15: Vm" quantity="Grans/15/Granule_98/v" scale="1mV" color="#3b6323" timeScale="1ms"/>
            <Line id="GrC 16: Vm" quantity="Grans/16/Granule_98/v" scale="1mV" color="#58bded" timeScale="1ms"/>
            <Line id="GrC 17: Vm" quantity="Grans/17/Granule_98/v" scale="1mV" color="#497639" timeScale="1ms"/>
            <Line id="GrC 18: Vm" quantity="Grans/18/Granule_98/v" scale="1mV" color="#58e43d" timeScale="1ms"/>
            <Line id="GrC 19: Vm" quantity="Grans/19/Granule_98/v" scale="1mV" color="#e2fa02" timeScale="1ms"/>
        </Display>

        <Display id="display_gol" title="Voltages Golgi cells" timeScale="1ms" xmin="-50.0" xmax="550.0" ymin="-95" ymax="-38">
            <Line id="Golgi 0: Vm" quantity="Golgis/0/Golgi_040408_C1/v" scale="1mV" color="#ef877c" timeScale="1ms"/>
            <Line id="Golgi 1: Vm" quantity="Golgis/1/Golgi_040408_C1/v" scale="1mV" color="#cda1ba" timeScale="1ms"/>
        </Display>

        <OutputFile id="Volts_file_grc" fileName="v_grc.dat">
            <OutputColumn id="v_0" quantity="Grans/0/Granule_98/v"/>
            <OutputColumn id="v_1" quantity="Grans/1/Granule_98/v"/>
            <OutputColumn id="v_2" quantity="Grans/2/Granule_98/v"/>
            <OutputColumn id="v_3" quantity="Grans/3/Granule_98/v"/>
            <OutputColumn id="v_4" quantity="Grans/4/Granule_98/v"/>
            <OutputColumn id="v_5" quantity="Grans/5/Granule_98/v"/>
            <OutputColumn id="v_6" quantity="Grans/6/Granule_98/v"/>
            <OutputColumn id="v_7" quantity="Grans/7/Granule_98/v"/>
            <OutputColumn id="v_8" quantity="Grans/8/Granule_98/v"/>
            <OutputColumn id="v_9" quantity="Grans/9/Granule_98/v"/>
            <OutputColumn id="v_10" quantity="Grans/10/Granule_98/v"/>
            <OutputColumn id="v_11" quantity="Grans/11/Granule_98/v"/>
            <OutputColumn id="v_12" quantity="Grans/12/Granule_98/v"/>
            <OutputColumn id="v_13" quantity="Grans/13/Granule_98/v"/>
            <OutputColumn id="v_14" quantity="Grans/14/Granule_98/v"/>
            <OutputColumn id="v_15" quantity="Grans/15/Granule_98/v"/>
            <OutputColumn id="v_16" quantity="Grans/16/Granule_98/v"/>
            <OutputColumn id="v_17" quantity="Grans/17/Granule_98/v"/>
            <OutputColumn id="v_18" quantity="Grans/18/Granule_98/v"/>
            <OutputColumn id="v_19" quantity="Grans/19/Granule_98/v"/>
        </OutputFile>

        <OutputFile id="Volts_file_gol" fileName="v_gol.dat">
            <OutputColumn id="v_0" quantity="Golgis/0/Golgi_040408_C1/v"/>
            <OutputColumn id="v_1" quantity="Golgis/1/Golgi_040408_C1/v"/>
        </OutputFile>

    </Simulation>

</Lems>
